p^2 + 6*p + 5 solve, p → [-1; -5]
[10, 0; 0, -3]*[2; 4] = [20; -12]
[0, -10; 0.5, -6]^-1*[-20; 12] = [48; 2]
[0, -10; 0.5, -6]*[12; 2] + [10, 0; 0, -3]*[2; 4] = [0; -18]
Given
A_1 := 0
A_2 := 0
12 == 48 + A_1 + A_2
0 == -A_1 - 5*A_2
Find(A_1, A_2) = [-45; 9]
Given
B_1 := 0
B_2 := 0
2 == 2 + B_1 + B_2
-18 == -B_1 - 5*B_2
Find(B_1, B_2) = [-4.5; 4.5]
ORIGIN := 0
Эйлер
# Число шагов
N := 30
# Начальные условия
Uc[0] := 12
IL[0] := 2
dUc[0] := 0
dIL[0] := -18
# Исследуемый отрезок
x_min := 0
x_max := 3
# Шаг интегрирования
h := (x_max - x_min)/N = 0.1
# Исследуемые функции
dUc(Uc, IL) := 20 - 10*IL
dIL(Uc, IL) := 0.5*Uc - 6*IL - 12
i := 1 .. N + 1
# Уравнения по методу Эйлера
x[i] := x_min + i*h
[Uc[i]; IL[i]] := [Uc[i - 1] + h*dUc(Uc[i - 1], IL[i - 1]); IL[i - 1] + h*dIL(Uc[i - 1], IL[i - 1])]
Uc_solved[i] := 48 + (-45*e^(-1*(i*h))) + 9*e^(-5*(i*h))
IL_solved[i] := 2 - 4.5*e^(-1*(i*h)) + 4.5*e^(-5*(i*h))
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